# OpenSim document version 30000
Model Pedaling_Model.osim:
  length_units: meters
  force_units: N
  gravity: 0 -9.80665 0
  credits:
    Rajagopal, A. et al. (2016) Full body musculoskeletal model for muscle-driven simulation of human gait. IEEE Trans Biomed Eng
    Lai,A.K.M., Arnold, A.S., Wakeling, J.M. (2017) Why are antagonist muscles co-activated in my simulation? A musculoskeletal model for analysing human locomotor tasks. Annals of Biomedical Engineering
  BodySet:
    Body ground: mass=0 mass_center=(0 0 0) inertia_xx=0 inertia_yy=0 inertia_zz=0
    Body pelvis: mass=40.47956 mass_center=(-0.0787527 0 0) inertia_xx=0.08630833 inertia_yy=0.08630833
        inertia_zz=0.06115189 meshes=(r_pelvis.vtp l_pelvis.vtp sacrum.vtp)
      WeldJoint ground_pelvis: parent_body=ground location_in_parent=(0 0 0) orientation_in_parent=(0 0 -0.2)
          location=(0 0 0)
      WrapCylinder Gmax1_at_pelvis_r: xyz_body_rotation=(-0.6 0.45 0) translation=(-0.0857703 -0.10592 0.0562908)
          quadrant=-x radius=0.04227577 length=0.1500728
      WrapCylinder Gmax2_at_pelvis_r: xyz_body_rotation=(-0.75 0.39 0) translation=(-0.089112 -0.0888017 0.0627504)
          quadrant=all radius=0.04203194 length=0.1012091
      WrapCylinder Gmax3_at_pelvis_r: xyz_body_rotation=(-0.1 0 0) translation=(-0.0924537 -0.0941512 0.0627504)
          quadrant=all radius=0.04364868 length=0.09243816
      WrapCylinder Gmax1_at_pelvis_l: xyz_body_rotation=(0.6 -0.45 0) translation=(-0.0857703 -0.10592 -0.0562908)
          quadrant=-x radius=0.04227577 length=0.1500728
      WrapCylinder Gmax2_at_pelvis_l: xyz_body_rotation=(0.75 -0.39 0) translation=(-0.089112 -0.0888017 -0.0627504)
          quadrant=all radius=0.04203194 length=0.1012091
      WrapCylinder Gmax3_at_pelvis_l: xyz_body_rotation=(0.1 0 0) translation=(-0.0924537 -0.0941512 -0.0627504)
          quadrant=all radius=0.04364868 length=0.09243816
      WrapCylinder PS_at_brim_r: xyz_body_rotation=(-0.25 -0.27 0.1) translation=(-0.0824286 -0.064194 0.0605357)
          quadrant=-y radius=0.05408527 length=0.09465284
      WrapCylinder PS_at_brim_l: xyz_body_rotation=(0.25 0.27 0.1) translation=(-0.0824286 -0.064194 -0.0605357)
          quadrant=-y radius=0.05408527 length=0.09465284
      WrapCylinder IL_at_brim_r: xyz_body_rotation=(-0.32 -0.24 0.9) translation=(-0.0790869 -0.0695435 0.0697637)
          quadrant=-y radius=0.05933356 length=0.0949167
      WrapCylinder IL_at_brim_l: xyz_body_rotation=(0.32 0.24 0.9) translation=(-0.0790869 -0.0695435 -0.0697637)
          quadrant=-y radius=0.05933356 length=0.0949167
    Body femur_r: mass=8.243095 mass_center=(0 -0.172567 0) inertia_xx=0.1222757 inertia_yy=0.03205286
        inertia_zz=0.128942 meshes=r_femur.vtp
      PinJoint hip_r: parent_body=pelvis location_in_parent=(-0.06268584 -0.08397645 0.07129553) location=(0 0 0)
        Coordinate hip_flexion_r: motion_type=rotational default_value=0.7030528 range=(-0.5235988 2.094395)
            clamped=true
      WrapCylinder GasLat_at_condyles_r: translation=(0.0050755 -0.416191 0) quadrant=all radius=0.0263926
          length=0.10151
      WrapCylinder GasMed_at_condyles_r: translation=(0.0050755 -0.416191 0) quadrant=all radius=0.0253775
          length=0.10151
      WrapCylinder KnExt_at_fem_r: xyz_body_rotation=(-0.0623366 0.0507601 0)
          translation=(0.00364246 -0.408813 0.00212269) quadrant=all radius=0.0253775 length=0.10151
      WrapCylinder KnExtVL_at_fem_r: xyz_body_rotation=(-0.0623366 0.0507601 0)
          translation=(0.00191679 -0.408813 0.00212269) quadrant=all radius=0.0253775 length=0.10151
      WrapCylinder AB_at_femshaft_r: xyz_body_rotation=(1.66157 0.186644 0) translation=(0.0148645 -0.114295 0.0237178)
          quadrant=all radius=0.01674915 length=0.071057
      WrapCylinder AL_at_femshaft_r: xyz_body_rotation=(1.77711 0.136489 0) translation=(0.0311968 -0.235411 0.0153419)
          quadrant=all radius=0.02040351 length=0.10151
      WrapCylinder AMprox_at_femshaft_r: xyz_body_rotation=(1.61126 0.18656 0)
          translation=(0.00526125 -0.0739955 0.0257866) quadrant=all radius=0.02141861 length=0.071057
      WrapCylinder AMmid_at_femshaft_r: xyz_body_rotation=(1.61139 0.13656 0) translation=(0.02336 -0.163138 0.020895)
          quadrant=all radius=0.02172314 length=0.121812
      WrapCylinder AMdist_at_femshaft_r: xyz_body_rotation=(1.71188 0.186636 0)
          translation=(0.0320838 -0.264673 0.00950601) quadrant=all radius=0.02212918 length=0.20302
      WrapCylinder AMisch_at_condyles_r: xyz_body_rotation=(1.71115 -0.463363 0)
          translation=(-0.0229931 -0.382521 -0.003202) quadrant=all radius=0.040604 length=0.243624
      WrapCylinder PECT_at_femshaft_r: xyz_body_rotation=(1.81295 0.276344 0)
          translation=(0.00617762 -0.0857789 0.0309002) quadrant=all radius=0.0152265 length=0.050755
    Body tibia_r: mass=3.285664 mass_center=(0 -0.195886 0) inertia_xx=0.04916874 inertia_yy=0.004975408
        inertia_zz=0.04985164 meshes=(r_tibia.vtp r_fibula.vtp)
      CustomJoint walker_knee_r: parent_body=femur_r location_in_parent=(-0.00456795 -0.415785 0)
          orientation_in_parent=(-1.570796 1.570796 1.570796) location=(-0.008487545 -0.003708712 0)
          orientation=(-1.570796 1.570796 1.570796)
        Coordinate knee_angle_r: motion_type=rotational default_value=0.6296053 range=(0 2.443461) clamped=true
        SpatialTransform:
          TransformAxis rotation1: coordinates=knee_angle_r axis=(1 0 0) LinearFunction(coefficients=1 0)
          TransformAxis rotation2: coordinates=knee_angle_r axis=(0 0 1) Constant(value=0)
          TransformAxis rotation3: coordinates=knee_angle_r axis=(0 1 0) Constant(value=0)
          TransformAxis translation1: coordinates=knee_angle_r axis=(1 0 0)
              MultiplierFunction(scale=1.0151, Constant(value=0))
          TransformAxis translation2: coordinates=knee_angle_r axis=(0 1 0)
            MultiplierFunction: scale=1.0151
              SimmSpline: x=(0 0.174533 0.349066 0.523599 0.698132 0.872665 1.0472 1.22173 1.39626 1.5708 1.74533 1.91986 2.0944)
                  y=(0 0.000301 0.000143 -0.000401 -0.001233 -0.002243 -0.003316 -0.004346 -0.005239 -0.005924 -0.006361 -0.006539 -0.00648)
          TransformAxis translation3: coordinates=knee_angle_r axis=(0 0 1)
            MultiplierFunction: scale=1.0151
              SimmSpline: x=(0 0.174533 0.349066 0.523599 0.698132 0.872665 1.0472 1.22173 1.39626 1.5708 1.74533 1.91986 2.0944)
                  y=(0 0.001055 0.002061 0.00289 0.003447 0.003676 0.003559 0.00311 0.002373 0.001418 0.000329 -0.000805 -0.001898)
      WrapCylinder GasLat_at_shank_r: xyz_body_rotation=(2.96723 -0.279725 -1.47812)
          translation=(-0.00776408 -0.0776408 -0.00346236) quadrant=-y radius=0.057706 length=0.10492
      WrapCylinder GasMed_at_shank_r: xyz_body_rotation=(2.96723 0.0279725 -1.47812)
          translation=(-0.00776408 -0.0776408 -0.00346236) quadrant=-y radius=0.0619028 length=0.10492
      WrapCylinder GR_at_condyles_r: xyz_body_rotation=(0 -0.4 0) translation=(-0.0031476 -0.020984 0) quadrant=all
          radius=0.0377712 length=0.10492
      WrapCylinder SM_at_condyles_r: xyz_body_rotation=(0 -0.1 0) translation=(-0.0010492 -0.020984 0) quadrant=all
          radius=0.0361974 length=0.10492
      WrapCylinder ST_at_condyles_r: xyz_body_rotation=(0 -0.2 0) translation=(-0.0020984 -0.0215086 0) quadrant=all
          radius=0.044591 length=0.10492
      WrapCylinder BF140_at_gastroc_r: translation=(-0.0409188 -0.062952 0) quadrant=y radius=0.0304268 length=0.15738
    Body talus_r: mass=0.08862208 mass_center=(0 0 0) inertia_xx=0.0008862208 inertia_yy=0.0008862208
        inertia_zz=0.0008862208 meshes=r_talus.vtp
      PinJoint ankle_r: parent_body=tibia_r location_in_parent=(-0.010492 -0.41968 0) location=(0 0 0)
        Coordinate ankle_angle_r: motion_type=rotational default_value=-0.1502997 range=(-0.6981317 0.5235988)
            clamped=true
    Body calcn_r: mass=1.107776 mass_center=(0.10097 0.030291 0) inertia_xx=0.001264896 inertia_yy=0.003523638
        inertia_zz=0.003704337 meshes=r_foot.vtp
      WeldJoint subtalar_r: parent_body=talus_r location_in_parent=(-0.04877 -0.04195 0.00792) location=(0 0 0)
    Body toes_r: mass=0.1919554 mass_center=(0.0370497 0.0064248 -0.018739) inertia_xx=0.0001016152
        inertia_yy=0.0002032304 inertia_zz=0.001016152 meshes=r_bofoot.vtp
      WeldJoint mtp_r: parent_body=calcn_r location_in_parent=(0.1805344 -0.0020194 0.001090476) location=(0 0 0)
    Body femur_l: mass=8.243095 mass_center=(0 -0.172567 0) inertia_xx=0.1222757 inertia_yy=0.03205286
        inertia_zz=0.128942 meshes=l_femur.vtp
      PinJoint hip_l: parent_body=pelvis location_in_parent=(-0.06268584 -0.08397645 -0.07129553) location=(0 0 0)
        Coordinate hip_flexion_l: motion_type=rotational default_value=1.555358 range=(-0.5235988 2.094395)
            clamped=true
      WrapCylinder GasLat_at_condyles_l: translation=(0.0050755 -0.416191 0) quadrant=all radius=0.0263926
          length=0.10151
      WrapCylinder GasMed_at_condyles_l: translation=(0.0050755 -0.416191 0) quadrant=all radius=0.0253775
          length=0.10151
      WrapCylinder KnExt_at_fem_l: xyz_body_rotation=(0.0623366 -0.0507601 0)
          translation=(0.00364246 -0.408813 -0.00212269) quadrant=all radius=0.0253775 length=0.10151
      WrapCylinder KnExtVL_at_fem_l: xyz_body_rotation=(0.0623366 -0.0507601 0)
          translation=(0.00191679 -0.408813 -0.00212269) quadrant=all radius=0.0253775 length=0.10151
      WrapCylinder AB_at_femshaft_l: xyz_body_rotation=(-1.66157 -0.186644 0)
          translation=(0.0148645 -0.114295 -0.0237178) quadrant=all radius=0.01674915 length=0.071057
      WrapCylinder AL_at_femshaft_l: xyz_body_rotation=(-1.77711 -0.136489 0)
          translation=(0.0311968 -0.235411 -0.0153419) quadrant=all radius=0.02040351 length=0.10151
      WrapCylinder AMprox_at_femshaft_l: xyz_body_rotation=(-1.61126 -0.18656 0)
          translation=(0.00526125 -0.0739955 -0.0257866) quadrant=all radius=0.02141861 length=0.071057
      WrapCylinder AMmid_at_femshaft_l: xyz_body_rotation=(-1.61139 -0.13656 0)
          translation=(0.02336 -0.163138 -0.020895) quadrant=all radius=0.02172314 length=0.121812
      WrapCylinder AMdist_at_femshaft_l: xyz_body_rotation=(-1.71188 -0.186636 0)
          translation=(0.0320838 -0.264673 -0.00950601) quadrant=all radius=0.02212918 length=0.20302
      WrapCylinder AMisch_at_condyles_l: xyz_body_rotation=(-1.71115 0.463363 0)
          translation=(-0.0229931 -0.382521 0.003202) quadrant=all radius=0.040604 length=0.243624
      WrapCylinder PECT_at_femshaft_l: xyz_body_rotation=(-1.81295 -0.276344 0)
          translation=(0.00617762 -0.0857789 -0.0309002) quadrant=all radius=0.0152265 length=0.050755
    Body tibia_l: mass=3.285664 mass_center=(0 -0.195886 0) inertia_xx=0.04916874 inertia_yy=0.004975408
        inertia_zz=0.04985164 meshes=(l_tibia.vtp l_fibula.vtp)
      CustomJoint walker_knee_l: parent_body=femur_l location_in_parent=(-0.00456795 -0.415785 0)
          orientation_in_parent=(1.570796 -1.570796 1.570796) location=(-0.008487545 -0.003708712 0)
          orientation=(1.570796 -1.570796 1.570796)
        Coordinate knee_angle_l: motion_type=rotational default_value=2.011591 range=(0 2.443461) clamped=true
        SpatialTransform:
          TransformAxis rotation1: coordinates=knee_angle_l axis=(-1 0 0) LinearFunction(coefficients=1 0)
          TransformAxis rotation2: coordinates=knee_angle_l axis=(0 0 1) Constant(value=0)
          TransformAxis rotation3: coordinates=knee_angle_l axis=(0 1 0) Constant(value=0)
          TransformAxis translation1: coordinates=knee_angle_l axis=(1 0 0)
              MultiplierFunction(scale=1.0151, Constant(value=0))
          TransformAxis translation2: coordinates=knee_angle_l axis=(0 1 0)
            MultiplierFunction: scale=1.0151
              SimmSpline: x=(0 0.174533 0.349066 0.523599 0.698132 0.872665 1.0472 1.22173 1.39626 1.5708 1.74533 1.91986 2.0944)
                  y=(0 0.000301 0.000143 -0.000401 -0.001233 -0.002243 -0.003316 -0.004346 -0.005239 -0.005924 -0.006361 -0.006539 -0.00648)
          TransformAxis translation3: coordinates=knee_angle_l axis=(0 0 1)
            MultiplierFunction: scale=1.0151
              SimmSpline: x=(0 0.174533 0.349066 0.523599 0.698132 0.872665 1.0472 1.22173 1.39626 1.5708 1.74533 1.91986 2.0944)
                  y=(0 -0.001055 -0.002061 -0.00289 -0.003447 -0.003676 -0.003559 -0.00311 -0.002373 -0.001418 -0.000329 0.000805 0.001898)
      WrapCylinder GasLat_at_shank_l: xyz_body_rotation=(-2.96723 0.279725 -1.47812)
          translation=(-0.00776408 -0.0776408 0.00346236) quadrant=-y radius=0.057706 length=0.10492
      WrapCylinder GasMed_at_shank_l: xyz_body_rotation=(-2.96723 -0.0279725 -1.47812)
          translation=(-0.00776408 -0.0776408 0.00346236) quadrant=-y radius=0.0619028 length=0.10492
      WrapCylinder GR_at_condyles_l: xyz_body_rotation=(0 0.4 0) translation=(-0.0031476 -0.020984 0) quadrant=all
          radius=0.0377712 length=0.10492
      WrapCylinder SM_at_condyles_l: xyz_body_rotation=(0 0.1 0) translation=(-0.0010492 -0.020984 0) quadrant=all
          radius=0.0361974 length=0.10492
      WrapCylinder ST_at_condyles_l: xyz_body_rotation=(0 0.2 0) translation=(-0.0020984 -0.0215086 0) quadrant=all
          radius=0.044591 length=0.10492
      WrapCylinder BF140_at_gastroc_l: translation=(-0.0409188 -0.062952 0) quadrant=all radius=0.0304268
          length=0.15738
    Body talus_l: mass=0.08862208 mass_center=(0 0 0) inertia_xx=0.0008862208 inertia_yy=0.0008862208
        inertia_zz=0.0008862208 meshes=l_talus.vtp
      PinJoint ankle_l: parent_body=tibia_l location_in_parent=(-0.010492 -0.41968 0) location=(0 0 0)
        Coordinate ankle_angle_l: motion_type=rotational default_value=0.2576949 range=(-0.6981317 0.5235988)
            clamped=true
    Body calcn_l: mass=1.107776 mass_center=(0.10097 0.030291 0) inertia_xx=0.001264896 inertia_yy=0.003523638
        inertia_zz=0.003704337 meshes=l_foot.vtp
      WeldJoint subtalar_l: parent_body=talus_l location_in_parent=(-0.04877 -0.04195 -0.00792) location=(0 0 0)
    Body toes_l: mass=0.1919554 mass_center=(0.0370497 0.0064248 0.018739) inertia_xx=0.0001016152
        inertia_yy=0.0002032304 inertia_zz=0.001016152 meshes=l_bofoot.vtp
      WeldJoint mtp_l: parent_body=calcn_l location_in_parent=(0.1805344 -0.0020194 -0.001090476) location=(0 0 0)
    Body crank: mass=1 mass_center=(0 0 0) inertia_xx=0 inertia_yy=0 inertia_zz=23.53 meshes=crank.vtp
      CustomJoint ground_crank: parent_body=ground location_in_parent=(0.1826514 -0.755543 0) location=(0 0 0)
        Coordinate crank_angle: motion_type=rotational default_value=0 default_speed_value=3.2812
            range=(-34.90659 34.90659) clamped=true
        SpatialTransform: axes_held_at_zero=(rotation2 rotation3 translation1 translation2 translation3)
          TransformAxis rotation1: coordinates=crank_angle axis=(0 0 -1) LinearFunction(coefficients=1 0)
  ForceSet:
    PointToPointSpring Spring_r: body1=crank body2=toes_r point1=(0 -0.17 0.080306) point2=(0 0 0)
        stiffness=100000 [N/m] rest_length=0
    PointToPointSpring Spring_l: body1=crank body2=toes_l point1=(0 0.17 -0.080306) point2=(0 0 0) stiffness=100000
        rest_length=0
    PrescribedForce CrankTorque: body=crank pointIsGlobal=false forceIsGlobal=true
      FunctionSet torqueFunctions: Constant(value=0) Constant(value=0)
        MultiplierFunction: scale=1
          SimmSpline: x=(0 0.0957 0.1914 0.2871 0.3828 0.4785 0.5742 0.6699 0.7656 0.8613 0.957 1.0527 1.1484 1.2441 1.3398 1.4355 1.5312 1.6269 1.7226 1.8183 1.914)
              y=(17.00324 14.89786 14.69664 15.5153 18.95722 25.02759 31.3831 34.36656 31.24731 22.73699 16.07851 14.85447 14.73495 15.51657 18.95566 25.02729 31.38296 34.3731 31.25014 22.5757 16.06146)
    Millard2012EquilibriumMuscle [values shared by the 18 below unless stated]: max_contraction_velocity=10
        fiber_damping=0.01 default_activation=0.01 activation_time_constant=0.01 [seconds]
        deactivation_time_constant=0.04 [seconds] minimum_activation=0.01
      ActiveForceLengthCurve: min_norm_active_fiber_length=0.441 transition_norm_fiber_length=0.73
          max_norm_active_fiber_length=1.8123 shallow_ascending_slope=0.8616 minimum_value=0
      ForceVelocityCurve: concentric_slope_at_vmax=0 concentric_slope_near_vmax=0.25 isometric_slope=5
          eccentric_slope_at_vmax=0 eccentric_slope_near_vmax=0.14 max_eccentric_velocity_force_multiplier=1.4
          concentric_curviness=0.6 eccentric_curviness=0.9
      TendonForceLengthCurve: strain_at_one_norm_force=0.049 stiffness_at_one_norm_force=28.06122
          norm_force_at_toe_end=0.6666667 curviness=0.5
    Millard2012EquilibriumMuscle semimem_r: max_isometric_force=3201 optimal_fiber_length=0.08821366
        tendon_slack_length=0.3729188 pennation_angle_at_optimal=0.2545615 [radians] default_fiber_length=0.06882385
      PathPoint P1: pelvis (-0.109942 -0.121969 0.0566599)
      PathPoint P2: tibia_r (-0.0283284 -0.0430172 -0.0205643)
      PathWrap: wrap_object=SM_at_condyles_r method=hybrid
      FiberForceLengthCurve: strain_at_zero_force=0 strain_at_one_norm_force=0.7 stiffness_at_low_force=0.1
          stiffness_at_one_norm_force=2.86 curviness=0.75
    Millard2012EquilibriumMuscle bfsh140_r: max_isometric_force=1073 optimal_fiber_length=0.09077965
        tendon_slack_length=0.08159968 pennation_angle_at_optimal=0.2642232 default_fiber_length=0.1389618
      PathPoint bfsh_r-P1: femur_r (0.0050755 -0.214288 0.0237533)
      PathPoint bfsh_r-P2: tibia_r (-0.0300701 -0.0344557 0.0336164)
      PathWrap: wrap_object=BF140_at_gastroc_r method=hybrid
      FiberForceLengthCurve: strain_at_zero_force=0 strain_at_one_norm_force=1.4 stiffness_at_low_force=0.01
          stiffness_at_one_norm_force=1.429 curviness=1
    Millard2012EquilibriumMuscle glmax2_r: max_isometric_force=3338 optimal_fiber_length=0.1910177
        tendon_slack_length=0.116907 pennation_angle_at_optimal=0.3673821 default_fiber_length=0.1673718
      PathPoint P1: pelvis (-0.146701 0.00930813 0.0426334)
      PathPoint P2: pelvis (-0.149708 -0.0651569 0.0750236)
      PathPoint P3: femur_r (-0.0456795 -0.0592818 0.0255805)
      PathPoint P4: femur_r (-0.0158356 -0.103134 0.0425327)
      PathWrap: wrap_object=Gmax2_at_pelvis_r method=hybrid
      FiberForceLengthCurve: strain_at_zero_force=0 strain_at_one_norm_force=0.7 stiffness_at_low_force=0.2
          stiffness_at_one_norm_force=2.86 curviness=0.75
    Millard2012EquilibriumMuscle psoas_r: max_isometric_force=2448 optimal_fiber_length=0.1057763
        tendon_slack_length=0.1163539 pennation_angle_at_optimal=0.2155251 default_fiber_length=0.1078262
      PathPoint P1: pelvis (-0.0675023 0.0663338 0.0359892)
      PathPoint P2: pelvis (-0.022835 -0.0699715 0.0605357)
      PathPoint P3: femur_r (-0.0133993 -0.0474052 0.00466946)
      PathPoint P4: femur_r (-0.0238548 -0.0531912 0.00893288)
      PathWrap: wrap_object=PS_at_brim_r method=hybrid range=(2 3)
      FiberForceLengthCurve: strain_at_zero_force=0 strain_at_one_norm_force=0.7 stiffness_at_low_force=0.2
          stiffness_at_one_norm_force=2.86 curviness=0.75
    Millard2012EquilibriumMuscle recfem_r_NoPatella: max_isometric_force=2192 optimal_fiber_length=0.06446318
        tendon_slack_length=0.4440797 pennation_angle_at_optimal=0.2170149 default_fiber_length=0.07635843
      PathPoint recfem_r-P1: pelvis (-0.0267336 -0.0415121 0.0860972)
      MovingPathPoint recfem_r-P2: tibia_r (0.0325375 0.0321193 0.00436041) x_coordinate=knee_angle_r
          y_coordinate=knee_angle_r z_coordinate=knee_angle_r
        x_location: MultiplierFunction: scale=1.0492
          SimmSpline f12: x=(0 0.222133 0.444266 0.666398 0.888531 1.11066 1.3328 1.55493 1.77706 1.9992 2.22133 2.44346)
              y=(0.0527686 0.041013 0.034737 0.0303261 0.0264412 0.0232223 0.0200999 0.017066 0.0141442 0.0118147 0.0101777 0.00979533)
        y_location: MultiplierFunction: scale=1.0492
          SimmSpline f13: x=(0 0.222133 0.444266 0.666398 0.888531 1.11066 1.3328 1.55493 1.77706 1.9992 2.22133 2.44346)
              y=(0.0310193 0.0318725 0.0312935 0.0304801 0.029728 0.0291164 0.0284594 0.0276384 0.02654 0.0255055 0.0251321 0.0237394)
        z_location: MultiplierFunction: scale=1.0492
          SimmSpline f14: x=(0 0.222133 0.444266 0.666398 0.888531 1.11066 1.3328 1.55493 1.77706 1.9992 2.22133 2.44346)
              y=(-0.000734206 0.00203172 0.00348875 0.00424082 0.00447925 0.0044307 0.00414576 0.00370701 0.00317118 0.00261734 0.00204062 0.00190214)
      MovingPathPoint recfem_r-P3: tibia_r (0.0373384 -0.0114348 0.00712922) x_coordinate=knee_angle_r
          y_coordinate=knee_angle_r z_coordinate=knee_angle_r
        x_location: MultiplierFunction: scale=1.0492
          SimmSpline f15: x=(0 0.22213 0.44427 0.6664 0.88853 1.11066 1.3328 1.55493 1.77706 1.9992 2.22133 2.44346)
              y=(0.0457172 0.0421782 0.0386122 0.0349895 0.0315466 0.0285548 0.0255257 0.0225161 0.0195722 0.0171565 0.0153648 0.0148275)
        y_location: MultiplierFunction: scale=1.0492
          SimmSpline f16: x=(0 0.22213 0.44427 0.6664 0.88853 1.11066 1.3328 1.55493 1.77706 1.9992 2.22133 2.44346)
              y=(-0.010219 -0.00993617 -0.0103213 -0.0110193 -0.0116845 -0.0122369 -0.0128561 -0.0136498 -0.014721 -0.0157187 -0.0160346 -0.017366)
        z_location: MultiplierFunction: scale=1.0492
          SimmSpline f17: x=(0 0.222133 0.444266 0.666398 0.888531 1.11066 1.3328 1.55493 1.77706 1.9992 2.22133 2.44346)
              y=(0.00029577 0.00346815 0.00562837 0.0069682 0.00769235 0.00801613 0.00801483 0.00782597 0.00758178 0.00745667 0.00749796 0.00793659)
      MovingPathPoint recfem_r-P4: tibia_r (0.0373384 -0.0114348 0.00712922) x_coordinate=knee_angle_r
          y_coordinate=knee_angle_r z_coordinate=knee_angle_r
        x_location: MultiplierFunction: scale=1.0492
          SimmSpline f18: x=(0 0.22213 0.44427 0.6664 0.88853 1.11066 1.3328 1.55493 1.77706 1.9992 2.22133 2.44346)
              y=(0.0457172 0.0421782 0.0386122 0.0349895 0.0315466 0.0285548 0.0255257 0.0225161 0.0195722 0.0171565 0.0153648 0.0148275)
        y_location: MultiplierFunction: scale=1.0492
          SimmSpline f19: x=(0 0.22213 0.44427 0.6664 0.88853 1.11066 1.3328 1.55493 1.77706 1.9992 2.22133 2.44346)
              y=(-0.010219 -0.00993617 -0.0103213 -0.0110193 -0.0116845 -0.0122369 -0.0128561 -0.0136498 -0.014721 -0.0157187 -0.0160346 -0.017366)
        z_location: MultiplierFunction: scale=1.0492
          SimmSpline f20: x=(0 0.222133 0.444266 0.666398 0.888531 1.11066 1.3328 1.55493 1.77706 1.9992 2.22133 2.44346)
              y=(0.00029577 0.00346815 0.00562837 0.0069682 0.00769235 0.00801613 0.00801483 0.00782597 0.00758178 0.00745667 0.00749796 0.00793659)
      PathPoint recfem_r-P5: tibia_r (0.0342039 -0.0662255 -0.000493124)
      PathWrap: wrap_object=KnExt_at_fem_r method=hybrid
      FiberForceLengthCurve: strain_at_zero_force=0 strain_at_one_norm_force=1.4 stiffness_at_low_force=0.05
          stiffness_at_one_norm_force=1.429 curviness=1
    Millard2012EquilibriumMuscle vaslat140_r_NoPatella: min_control=0 max_control=1 optimal_force=1
        max_isometric_force=5149 optimal_fiber_length=0.09048494 tendon_slack_length=0.2456907
        pennation_angle_at_optimal=0.2528673 default_activation=0.05 default_fiber_length=0.0843771
      PathPoint vaslat_r-P6: femur_r (0.00487248 -0.1882 0.035427)
      PathPoint vaslat_r-P7: femur_r (0.0273062 -0.263012 0.0415176)
      MovingPathPoint vas_int_r-P8: tibia_r (0.0290542 0.0305494 0.0199207) x_coordinate=knee_angle_r
          y_coordinate=knee_angle_r z_coordinate=knee_angle_r
        x_location: MultiplierFunction: scale=1.0492
          SimmSpline f11: x=(0 0.222133 0.444266 0.666398 0.888531 1.11066 1.3328 1.55493 1.77706 1.9992 2.22133 2.44346)
              y=(0.0509701 0.0386291 0.0317987 0.0269417 0.0227481 0.0193282 0.0160826 0.0129748 0.00999932 0.00760735 0.00587395 0.00535643)
        y_location: MultiplierFunction: scale=1.0492
          SimmSpline f12: x=(0 0.222133 0.444266 0.666398 0.888531 1.11066 1.3328 1.55493 1.77706 1.9992 2.22133 2.44346)
              y=(0.0296172 0.030263 0.0297182 0.029 0.0283394 0.0278085 0.0272238 0.0264773 0.0254761 0.0245928 0.0244397 0.0232463)
        z_location: MultiplierFunction: scale=1.0492
          SimmSpline f13: x=(0 0.222133 0.444266 0.666398 0.888531 1.11066 1.3328 1.55493 1.77706 1.9992 2.22133 2.44346)
              y=(0.0143658 0.0170296 0.0183916 0.0190585 0.0192319 0.019139 0.0188272 0.0183741 0.0178306 0.0172691 0.0166765 0.0165057)
      MovingPathPoint vas_int_r-P9: tibia_r (0.0363256 -0.0112542 0.0147189) x_coordinate=knee_angle_r
          y_coordinate=knee_angle_r z_coordinate=knee_angle_r
        x_location: MultiplierFunction: scale=1.0492
          SimmSpline f14: x=(0 0.22213 0.44427 0.6664 0.88853 1.11066 1.3328 1.55493 1.77706 1.9992 2.22133 2.44346)
              y=(0.0457171 0.041743 0.0378494 0.0339906 0.0303858 0.0272898 0.0241978 0.021151 0.0181811 0.0157364 0.0139004 0.0132996)
        y_location: MultiplierFunction: scale=1.0492
          SimmSpline f15: x=(0 0.22213 0.44427 0.6664 0.88853 1.11066 1.3328 1.55493 1.77706 1.9992 2.22133 2.44346)
              y=(-0.010219 -0.00987779 -0.0101998 -0.0108376 -0.0114502 -0.011959 -0.0125409 -0.0132976 -0.0143214 -0.0152463 -0.0154567 -0.0166927)
        z_location: MultiplierFunction: scale=1.0492
          SimmSpline f16: x=(0 0.222133 0.444266 0.666398 0.888531 1.11066 1.3328 1.55493 1.77706 1.9992 2.22133 2.44346)
              y=(0.00759577 0.0107549 0.0128874 0.0141972 0.0148957 0.0152003 0.0151861 0.0149886 0.0147369 0.0146016 0.0146262 0.0150431)
      PathPoint vas_int_r-P10: tibia_r (0.034141 -0.0664983 0.00536141)
      PathWrap: wrap_object=KnExt_at_fem_r method=hybrid
      FiberForceLengthCurve: strain_at_zero_force=0 strain_at_one_norm_force=1.4 stiffness_at_low_force=0.05
          stiffness_at_one_norm_force=1.429 curviness=1
    Millard2012EquilibriumMuscle gasmed_r: max_isometric_force=2300 optimal_fiber_length=0.06167155
        tendon_slack_length=0.4181122 pennation_angle_at_optimal=0.1656816 default_fiber_length=0.04236317
      PathPoint P1: femur_r (0.0060906 -0.390813 -0.0223322)
      PathPoint P2: calcn_r (0.00444268 0.0313007 -0.00535141)
      PathWrap: wrap_object=GasMed_at_shank_r method=hybrid
      PathWrap: wrap_object=GasMed_at_condyles_r method=hybrid
      FiberForceLengthCurve: strain_at_zero_force=0 strain_at_one_norm_force=0.7 stiffness_at_low_force=0.2
          stiffness_at_one_norm_force=2.86 curviness=0.75
    Millard2012EquilibriumMuscle soleus_r: max_isometric_force=4195 optimal_fiber_length=0.04600911
        tendon_slack_length=0.2941969 pennation_angle_at_optimal=0.3814289 default_fiber_length=0.04006543
      PathPoint P1: tibia_r (-0.00797392 -0.0961067 0.0102822)
      PathPoint P2: calcn_r (0.00444268 0.0313007 -0.00535141)
      FiberForceLengthCurve: strain_at_zero_force=0 strain_at_one_norm_force=1.4 stiffness_at_low_force=0.2
          stiffness_at_one_norm_force=1.429 curviness=0.75
    Millard2012EquilibriumMuscle tibant_r: max_isometric_force=1027 optimal_fiber_length=0.07113035
        tendon_slack_length=0.2504247 pennation_angle_at_optimal=0.1951828 default_fiber_length=0.0757638
      PathPoint P1: tibia_r (0.0161577 -0.137655 0.016997)
      PathPoint P2: tibia_r (0.0263349 -0.199978 0.0134298)
      PathPoint P3: tibia_r (0.0244464 -0.383902 -0.0138494)
      PathPoint P4: calcn_r (0.117731 0.0179727 -0.0307959)
      FiberForceLengthCurve: strain_at_zero_force=0 strain_at_one_norm_force=1.4 stiffness_at_low_force=0.1
          stiffness_at_one_norm_force=1.429 curviness=1
    Millard2012EquilibriumMuscle semimem_l: max_isometric_force=3201 optimal_fiber_length=0.08821366
        tendon_slack_length=0.3729188 pennation_angle_at_optimal=0.2545615 default_fiber_length=0.06470009
      PathPoint P1: pelvis (-0.109942 -0.121969 -0.0566599)
      PathPoint P2: tibia_l (-0.0283284 -0.0430172 0.0205643)
      PathWrap: wrap_object=SM_at_condyles_l method=hybrid
      FiberForceLengthCurve: strain_at_zero_force=0 strain_at_one_norm_force=0.7 stiffness_at_low_force=0.1
          stiffness_at_one_norm_force=2.86 curviness=0.75
    Millard2012EquilibriumMuscle bfsh140_l: max_isometric_force=1073 optimal_fiber_length=0.09077965
        tendon_slack_length=0.08159968 pennation_angle_at_optimal=0.2642232 default_fiber_length=0.1006554
      PathPoint bfsh_l-P1: femur_l (0.0050755 -0.214288 -0.0237533)
      PathPoint bfsh_l-P2: tibia_l (-0.0300701 -0.0344557 -0.0336164)
      PathWrap: wrap_object=BF140_at_gastroc_l method=hybrid
      FiberForceLengthCurve: strain_at_zero_force=0 strain_at_one_norm_force=1.4 stiffness_at_low_force=0.01
          stiffness_at_one_norm_force=1.429 curviness=1
    Millard2012EquilibriumMuscle glmax2_l: max_isometric_force=3338 optimal_fiber_length=0.1910177
        tendon_slack_length=0.116907 pennation_angle_at_optimal=0.3673821 default_fiber_length=0.2008023
      PathPoint P1: pelvis (-0.146701 0.00930813 -0.0426334)
      PathPoint P2: pelvis (-0.149708 -0.0651569 -0.0750236)
      PathPoint P3: femur_l (-0.0456795 -0.0592818 -0.0255805)
      PathPoint P4: femur_l (-0.0158356 -0.103134 -0.0425327)
      PathWrap: wrap_object=Gmax2_at_pelvis_l method=hybrid
      FiberForceLengthCurve: strain_at_zero_force=0 strain_at_one_norm_force=0.7 stiffness_at_low_force=0.2
          stiffness_at_one_norm_force=2.86 curviness=0.75
    Millard2012EquilibriumMuscle psoas_l: max_isometric_force=2448 optimal_fiber_length=0.1057763
        tendon_slack_length=0.1163539 pennation_angle_at_optimal=0.2155251 default_fiber_length=0.07789078
      PathPoint P1: pelvis (-0.0675023 0.0663338 -0.0359892)
      PathPoint P2: pelvis (-0.022835 -0.0699715 -0.0605357)
      PathPoint P3: femur_l (-0.0133993 -0.0474052 -0.00466946)
      PathPoint P4: femur_l (-0.0238548 -0.0531912 -0.00893288)
      PathWrap: wrap_object=PS_at_brim_l method=hybrid range=(2 3)
      FiberForceLengthCurve: strain_at_zero_force=0 strain_at_one_norm_force=0.7 stiffness_at_low_force=0.2
          stiffness_at_one_norm_force=2.86 curviness=0.75
    Millard2012EquilibriumMuscle recfem_l_NoPatella: max_isometric_force=2192 optimal_fiber_length=0.06446318
        tendon_slack_length=0.4440797 pennation_angle_at_optimal=0.2170149 default_fiber_length=0.07522452
      PathPoint recfem_l-P1: pelvis (-0.0267336 -0.0415121 -0.0860972)
      MovingPathPoint recfem_l-P2: tibia_l (0.0122783 0.0267261 -0.00271073) x_coordinate=knee_angle_l
          y_coordinate=knee_angle_l z_coordinate=knee_angle_l
        x_location: MultiplierFunction: scale=1.0492
          SimmSpline f12: x=(0 0.222133 0.444266 0.666398 0.888531 1.11066 1.3328 1.55493 1.77706 1.9992 2.22133 2.44346)
              y=(0.0527686 0.041013 0.034737 0.0303261 0.0264412 0.0232223 0.0200999 0.017066 0.0141442 0.0118147 0.0101777 0.00979533)
        y_location: MultiplierFunction: scale=1.0492
          SimmSpline f13: x=(0 0.222133 0.444266 0.666398 0.888531 1.11066 1.3328 1.55493 1.77706 1.9992 2.22133 2.44346)
              y=(0.0310193 0.0318725 0.0312935 0.0304801 0.029728 0.0291164 0.0284594 0.0276384 0.02654 0.0255055 0.0251321 0.0237394)
        z_location: MultiplierFunction: scale=1.0492
          SimmSpline f14: x=(0 0.222133 0.444266 0.666398 0.888531 1.11066 1.3328 1.55493 1.77706 1.9992 2.22133 2.44346)
              y=(0.000734206 -0.00203172 -0.00348875 -0.00424082 -0.00447925 -0.0044307 -0.00414576 -0.00370701 -0.00317118 -0.00261734 -0.00204062 -0.00190214)
      MovingPathPoint recfem_r-P3: tibia_l (0.0178754 -0.0165235 -0.00782011) x_coordinate=knee_angle_l
          y_coordinate=knee_angle_l z_coordinate=knee_angle_l
        x_location: MultiplierFunction: scale=1.0492
          SimmSpline f15: x=(0 0.22213 0.44427 0.6664 0.88853 1.11066 1.3328 1.55493 1.77706 1.9992 2.22133 2.44346)
              y=(0.0457172 0.0421782 0.0386122 0.0349895 0.0315466 0.0285548 0.0255257 0.0225161 0.0195722 0.0171565 0.0153648 0.0148275)
        y_location: MultiplierFunction: scale=1.0492
          SimmSpline f16: x=(0 0.22213 0.44427 0.6664 0.88853 1.11066 1.3328 1.55493 1.77706 1.9992 2.22133 2.44346)
              y=(-0.010219 -0.00993617 -0.0103213 -0.0110193 -0.0116845 -0.0122369 -0.0128561 -0.0136498 -0.014721 -0.0157187 -0.0160346 -0.017366)
        z_location: MultiplierFunction: scale=1.0492
          SimmSpline f17: x=(0 0.222133 0.444266 0.666398 0.888531 1.11066 1.3328 1.55493 1.77706 1.9992 2.22133 2.44346)
              y=(-0.00029577 -0.00346815 -0.00562837 -0.0069682 -0.00769235 -0.00801613 -0.00801483 -0.00782597 -0.00758178 -0.00745667 -0.00749796 -0.00793659)
      MovingPathPoint recfem_l-P4: tibia_l (0.0178754 -0.0165235 -0.00782011) x_coordinate=knee_angle_l
          y_coordinate=knee_angle_l z_coordinate=knee_angle_l
        x_location: MultiplierFunction: scale=1.0492
          SimmSpline f18: x=(0 0.22213 0.44427 0.6664 0.88853 1.11066 1.3328 1.55493 1.77706 1.9992 2.22133 2.44346)
              y=(0.0457172 0.0421782 0.0386122 0.0349895 0.0315466 0.0285548 0.0255257 0.0225161 0.0195722 0.0171565 0.0153648 0.0148275)
        y_location: MultiplierFunction: scale=1.0492
          SimmSpline f19: x=(0 0.22213 0.44427 0.6664 0.88853 1.11066 1.3328 1.55493 1.77706 1.9992 2.22133 2.44346)
              y=(-0.010219 -0.00993617 -0.0103213 -0.0110193 -0.0116845 -0.0122369 -0.0128561 -0.0136498 -0.014721 -0.0157187 -0.0160346 -0.017366)
        z_location: MultiplierFunction: scale=1.0492
          SimmSpline f20: x=(0 0.222133 0.444266 0.666398 0.888531 1.11066 1.3328 1.55493 1.77706 1.9992 2.22133 2.44346)
              y=(-0.00029577 -0.00346815 -0.00562837 -0.0069682 -0.00769235 -0.00801613 -0.00801483 -0.00782597 -0.00758178 -0.00745667 -0.00749796 -0.00793659)
      PathPoint recfem_l-P5: tibia_l (0.0342039 -0.0662255 0.000493124)
      PathWrap: wrap_object=KnExt_at_fem_l method=hybrid
      FiberForceLengthCurve: strain_at_zero_force=0 strain_at_one_norm_force=1.4 stiffness_at_low_force=0.05
          stiffness_at_one_norm_force=1.429 curviness=1
    Millard2012EquilibriumMuscle vaslat140_l_NoPatella: min_control=0 max_control=1 optimal_force=1
        max_isometric_force=5149 optimal_fiber_length=0.09048494 tendon_slack_length=0.2456907
        pennation_angle_at_optimal=0.2528673 default_activation=0.05 default_fiber_length=0.1220722
      PathPoint vaslat_l-P6: femur_l (0.00487248 -0.1882 -0.035427)
      PathPoint vaslat_l-P7: femur_l (0.0273062 -0.263012 -0.0415176)
      MovingPathPoint vas_int_l-P8: tibia_l (0.00785937 0.0257799 -0.0180827) x_coordinate=knee_angle_l
          y_coordinate=knee_angle_l z_coordinate=knee_angle_l
        x_location: MultiplierFunction: scale=1.0492
          SimmSpline f11: x=(0 0.222133 0.444266 0.666398 0.888531 1.11066 1.3328 1.55493 1.77706 1.9992 2.22133 2.44346)
              y=(0.0509701 0.0386291 0.0317987 0.0269417 0.0227481 0.0193282 0.0160826 0.0129748 0.00999932 0.00760735 0.00587395 0.00535643)
        y_location: MultiplierFunction: scale=1.0492
          SimmSpline f12: x=(0 0.222133 0.444266 0.666398 0.888531 1.11066 1.3328 1.55493 1.77706 1.9992 2.22133 2.44346)
              y=(0.0296172 0.030263 0.0297182 0.029 0.0283394 0.0278085 0.0272238 0.0264773 0.0254761 0.0245928 0.0244397 0.0232463)
        z_location: MultiplierFunction: scale=1.0492
          SimmSpline f13: x=(0 0.222133 0.444266 0.666398 0.888531 1.11066 1.3328 1.55493 1.77706 1.9992 2.22133 2.44346)
              y=(-0.0143658 -0.0170296 -0.0183916 -0.0190585 -0.0192319 -0.019139 -0.0188272 -0.0183741 -0.0178306 -0.0172691 -0.0166765 -0.0165057)
      MovingPathPoint vas_int_l-P9: tibia_l (0.0163833 -0.0160223 -0.0153158) x_coordinate=knee_angle_l
          y_coordinate=knee_angle_l z_coordinate=knee_angle_l
        x_location: MultiplierFunction: scale=1.0492
          SimmSpline f14: x=(0 0.22213 0.44427 0.6664 0.88853 1.11066 1.3328 1.55493 1.77706 1.9992 2.22133 2.44346)
              y=(0.0457171 0.041743 0.0378494 0.0339906 0.0303858 0.0272898 0.0241978 0.021151 0.0181811 0.0157364 0.0139004 0.0132996)
        y_location: MultiplierFunction: scale=1.0492
          SimmSpline f15: x=(0 0.22213 0.44427 0.6664 0.88853 1.11066 1.3328 1.55493 1.77706 1.9992 2.22133 2.44346)
              y=(-0.010219 -0.00987779 -0.0101998 -0.0108376 -0.0114502 -0.011959 -0.0125409 -0.0132976 -0.0143214 -0.0152463 -0.0154567 -0.0166927)
        z_location: MultiplierFunction: scale=1.0492
          SimmSpline f16: x=(0 0.222133 0.444266 0.666398 0.888531 1.11066 1.3328 1.55493 1.77706 1.9992 2.22133 2.44346)
              y=(-0.00759577 -0.0107549 -0.0128874 -0.0141972 -0.0148957 -0.0152003 -0.0151861 -0.0149886 -0.0147369 -0.0146016 -0.0146262 -0.0150431)
      PathPoint vas_int_l-P10: tibia_l (0.034141 -0.0664983 -0.00536141)
      PathWrap: wrap_object=KnExt_at_fem_l method=hybrid
      FiberForceLengthCurve: strain_at_zero_force=0 strain_at_one_norm_force=1.4 stiffness_at_low_force=0.05
          stiffness_at_one_norm_force=1.429 curviness=1
    Millard2012EquilibriumMuscle gasmed_l: max_isometric_force=2300 optimal_fiber_length=0.06167155
        tendon_slack_length=0.4181122 pennation_angle_at_optimal=0.1656816 default_fiber_length=0.02730309
      PathPoint P1: femur_l (0.0060906 -0.390813 0.0223322)
      PathPoint P2: calcn_l (0.00444268 0.0313007 0.00535141)
      PathWrap: wrap_object=GasMed_at_shank_l method=hybrid
      PathWrap: wrap_object=GasMed_at_condyles_l method=hybrid
      FiberForceLengthCurve: strain_at_zero_force=0 strain_at_one_norm_force=0.7 stiffness_at_low_force=0.2
          stiffness_at_one_norm_force=2.86 curviness=0.75
    Millard2012EquilibriumMuscle soleus_l: max_isometric_force=4195 optimal_fiber_length=0.04600911
        tendon_slack_length=0.2941969 pennation_angle_at_optimal=0.3814289 default_fiber_length=0.0549304
      PathPoint P1: tibia_l (-0.00797392 -0.0961067 -0.0102822)
      PathPoint P2: calcn_l (0.00444268 0.0313007 0.00535141)
      FiberForceLengthCurve: strain_at_zero_force=0 strain_at_one_norm_force=1.4 stiffness_at_low_force=0.2
          stiffness_at_one_norm_force=1.429 curviness=0.75
    Millard2012EquilibriumMuscle tibant_l: max_isometric_force=1027 optimal_fiber_length=0.07113035
        tendon_slack_length=0.2504247 pennation_angle_at_optimal=0.1951828 default_fiber_length=0.05674926
      PathPoint P1: tibia_l (0.0161577 -0.137655 -0.016997)
      PathPoint P2: tibia_l (0.0263349 -0.199978 -0.0134298)
      PathPoint P3: tibia_l (0.0244464 -0.383902 0.0138494)
      PathPoint P4: calcn_l (0.117731 0.0179727 0.0307959)
      FiberForceLengthCurve: strain_at_zero_force=0 strain_at_one_norm_force=1.4 stiffness_at_low_force=0.1
          stiffness_at_one_norm_force=1.429 curviness=1
